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X1 := 5
X2 := 0
Y1 := 5
Y2 := 0
Z := 0
W := (X1 - X2)*(Y1 - Y2)/10 + Z = 2.5
k := 5*10^4
Uk(x) := 5 - k*x
Uk(100*10^-6) = 0
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Uin := 5
R8 := 100
R14 := 31830
C7 := 5*10^-9
C10 := 100*10^-12
w := 2*π*100
Uout := Uin*R14*1/(1i*w*C10)/((R14 + 1/(1i*w*C10))*(R8 + 1/(1i*w*C7))) = 0.00115701 + 0.499982i
|Uout| = 0.499983
